<?xml version="1.0"?>

<!--Caractéristiques techniques de l' AS 319B
Type: Alouette III SA 319B
Moteur : 1 Turbomeca ASTAZOU XIV
Puissance : 640Kw réduit à 442 Kw.
Longueur : 10,03m. (pales repliées)
Diamètre rotor : 11,02m.
Vitesse : 197 km/h.
Masse maxi : 2250 kg.
Autonomie :
Distance franchissable : 435 Km

Caractéristiques techniques de l' AS 316B
Type: Alouette III SA 316B
Moteur : 1 Turbomeca ARTOUST IIIB
Puissance : 640Kw réduit à 410 Kw.
Longueur : 10,03m. (pales repliées)
Diamètre rotor : 11,02m.
Vitesse : 85 km/h.
Masse maxi : 2200 kg.
Autonomie :
Distance franchissable : 200 Km


Common specifications

Aptitude : VFR mono-pilote.
Capacité d'emport :  6 passagers en configuration secours en montagne
Masse interne : 900 Kg
Sous élingue :
Longueur treuil : 45 m.
Volume utile de la cabine : 1,5m3.
Capacité du treuil : 136 kg-->


<!--
MILTHRUST   [LBS]
MAXTHRUST   [LBS]
idlen1      [%]
maxn1       [%]
betarangeend[%]
    if ThrottleCmd < betarangeend/100.0 then engine power=idle, propeller pitch
    is controled by ThrottleCmd (between MINPITCH and  REVERSEPITCH).
    if ThrottleCmd > betarangeend/100.0 then engine power increases up to max reverse power
reversemaxpower [%]
    max engine power in reverse mode
maxpower    [HP]
psfc power specific fuel consumption [pph/HP] for N1=100%
n1idle_max_delay [-] time constant for N1 change
maxstartenginetime [sec]
    after this time the automatic starting cycle is interrupted when the engine
    doesn't start (0=automatic starting not present)
startern1   [%]
    when starting starter spin up engine to this spin
ielumaxtorque [lb.ft]
    if torque>ielumaxtorque limiters decrease the throttle
    (ielu = Integrated Electronic Limiter Unit)
itt_delay [-] time constant for ITT change
    (ITT = Inter Turbine Temperature)
-->

<!--Extrapolated from  turboprop model engtm601.xml (JSBSIMCVS/JSBSim/engine)-->


<!--turbine RPM 33500
output shaft RPM 5770 ( clutch input )-->


<turboprop_engine name="artoust3b">
    <milthrust unit="LBS">       1971.2    </milthrust>
  <idlen1>                       60.0   </idlen1>
  <maxn1>                       100.0   </maxn1>
  <maxpower unit="HP">          550.0   </maxpower>
  <psfc unit="LBS/HR/HP">         0.669 </psfc>
  <!--<idlefuelflow>                 30.0   </idlefuelflow>-->
  <n1idle_max_delay>              1     </n1idle_max_delay>
  <maxstartingtime>              2     </maxstartingtime>
  <startern1>                    20     </startern1>
  <ielumaxtorque unit="FT*LB"> 5500     </ielumaxtorque>
  <itt_delay>                     0.05  </itt_delay>
  <betarangeend>                 64     </betarangeend>
  <reversemaxpower>              0     </reversemaxpower>
  <function name="EnginePowerVC">
    <description> Engine power, function of airspeed and pressure </description>
    <table>
    <independentVar lookup="row">atmosphere/P-psf</independentVar>
    <independentVar lookup="column">velocities/ve-kts</independentVar>
    <tableData>
                 0     50    100    150    200    250
       503   0.357  0.380  0.400  0.425  0.457  0.486
      1048   0.586  0.589  0.600  0.621  0.650  0.686
      1328   0.707  0.721  0.731  0.757  0.786  0.821
      1496   0.779  0.786  0.808  0.821  0.857  0.900
      1684   0.850  0.857  0.874  0.900  0.943  0.979
      1896   0.914  0.929  0.946  0.971  1      1.057
      2135   1      1.011  1.029  1.043  1.083  1.150
      2213   1.029  1.043  1.057  1.079  1.114  1.171
    </tableData>
  </table>
 </function>


 <!-- temporary giving a very low effinciency at N1 / RPM   range 0 %  to 86 %  and 18000 RPM
  just to simulate at idle  since we are  missing within the source code lost of hp due to gear  and other transmission  between-->


  <table name="EnginePowerRPM_N1" type="internal">
    <description> Engine Power, function of RPM and N1 </description>
    <tableData>
                        00.00	05.00	60.00	86.00	94.00	95.00	96.00	97.00	98.00	99.00	100.00	101.00
        -100 	00.00	00.40	00.40	00.40	00.40	00.40	00.40	00.40	01.00 	01.50	02.00	03.00
        18800	 00.00	00.03	01.40	03.00	04.00	05.00	06.00	06.00	06.00       07.00	07.00	08.50
        24000	00.00	00.03	03.00	193.86	337.14	362.43	396.14	425.64	463.57	497.29	539.43	573.14
        27000	00.00	00.084	05.21	202.29	370.86	400.36	429.86	463.57	501.50	531.00	573.143	606.86
        33500	00.00	00.084	08.40	189.64	379.29	417.21	442.50	476.21	514.14	547.86	590.00	627.93
        37000	00.00	00.084	08.40	172.79	370.86	404.57	434.07	472.00	509.93	543.64	585.79	626.24
	40000	00.00	00.00	00.00	 00.00	 00.00	 00.00	 00.00	 00.00	 00.00	 00.00	 00.00	 00.00

    </tableData>
  </table>

  <table name="ITT_N1" type="internal">
    <description> Inter-Turbine Temperature ITT [deg C] depending on N1 and engine run (0=off / 1=running) </description>
    <tableData>
              0     1
        0     0     0
       15   100   100
       60   180   460
       96   270   620
      100   280   670
    </tableData>
  </table>

</turboprop_engine>
